<?xml version="1.0"?>

<!-- SUMPAC Human-Powered Airplane -->
<!-- Copyright 2019 Wayne Bragg -->

<propeller name="prop">
  <ixx unit="KG*M2"> 0.8 </ixx>
  <diameter unit="IN"> 144.0 </diameter>
  <numblades> 2 </numblades>
  <gearratio>  1.0  </gearratio>
  <p_factor>  11.38 </p_factor>

  <table name="C_THRUST" type="internal">
     <tableData>
	0.0000  0.0659
	0.1885	0.0516
	0.2042	0.0503
	0.2199	0.0490
	0.2356	0.0477
	0.2513	0.0464
	0.2670	0.0450
	0.2827	0.0437
	0.2985	0.0423
	0.3142	0.0408
	0.3299	0.0394
	0.3456	0.0379
	0.3613	0.0364
	0.3770	0.0348
	0.3927	0.0332
	0.4084	0.0316
	0.4241	0.0300
	0.4398	0.0283
	0.4555	0.0267
	0.4712	0.0250
	0.4869	0.0233
	0.5027	0.0215
	0.5184	0.0198
	0.5341	0.0180
	0.5498	0.0162
	0.5655	0.0144
	0.5812	0.0126
	0.5969	0.0107
	0.6126	0.0089
	0.6283	0.0070
	0.6440	0.0051
	0.6597	0.0032
	0.6754	0.0013
	0.6912	-0.0006
	0.7854	-0.0124
	1.5708	-0.1463
	3.1416	-0.5814
     </tableData>
  </table>

  <table name="C_POWER" type="internal">
     <tableData>
	0.0000	0.0067
	0.1885	0.0094
	0.2042	0.0094
	0.2199	0.0094
	0.2356	0.0093
	0.2513	0.0093
	0.2670	0.0093
	0.2827	0.0092
	0.2985	0.0092
	0.3142	0.0091
	0.3299	0.0090
	0.3456	0.0088
	0.3613	0.0087
	0.3770	0.0086
	0.3927	0.0084
	0.4084	0.0082
	0.4241	0.0080
	0.4398	0.0077
	0.4555	0.0074
	0.4712	0.0072
	0.4869	0.0069
	0.5027	0.0065
	0.5184	0.0062
	0.5341	0.0058
	0.5498	0.0054
	0.5655	0.0050
	0.5812	0.0045
	0.5969	0.0040
	0.6126	0.0035
	0.6283	0.0030
	0.6440	0.0024
	0.6597	0.0019
	0.6754	0.0012
	0.6912	0.0006
	0.7854	-0.0031
	1.5708	-0.0663
	3.1416	-0.3524
     </tableData>
  </table>

</propeller>
